*Heading
** Job name: Job-1 Model name: Model-1
*Preprint, echo=NO, model=NO, history=NO, contact=NO
** Generated by: Abaqus/CAE 2020
**
** PARTS
**
*Node
      1,           1.,           1.
      2,         0.75,           1.
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*User element, nodes=4, type=U1, properties=2, coordinates=2, variables=16
1, 2
*Element, TYPE=U1
1,  1,  2,  7,  6
 2,  2,  3,  8,  7
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*ELEMENT, TYPE=CPE4, elset=decoy
 17,  1,  2,  7,  6
 18,  2,  3,  8,  7
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*Nset, nset=SOLID,  generate
 1,  25,  1
*Elset, elset=SOLID, generate
 1, 16, 1
*UEL PROPERTY, ELSET=SOLID
200e3, 0.3
*Nset, nset=push
 1, 6, 11, 16, 21
*Nset, nset=supp
 5, 10, 15, 20, 25
*Solid Section, elset=decoy, material=decoy
1.,
*Material, name=decoy
*Depvar
4,
*User Material, constants=2
1.0e-11, 0.3
** ----------------------------------------------------------------
**
** STEP: Step-1
*Restart, write, frequency=0
**
*Step, name=Step-1, nlgeom=NO
*Static
1., 1., 1e-05, 1.
**
** BOUNDARY CONDITIONS
**
** Name: BC-1 Type: Displacement/Rotation
*Boundary
supp, 1, 1
supp, 2, 2
** Name: BC-2 Type: Displacement/Rotation

*Boundary
push, 1, 1, 0.01
**
** OUTPUT REQUESTS
**
*Output, field, number interval=1
*element output, elset=decoy
SDV
*Node Output
U
*Output, history, variable=PRESELECT
*Node Output,nset=supp
RF
*End Step
